####----------TENSILE TEST of Ni2Cr Intermetallic in z direction[001]---------####

# ------------------------ INITIALIZATION ----------------------------
units 		metal
dimension	3
boundary	p   p	p
atom_style	atomic

# ----------------------- ATOM DEFINITION ----------------------------
read_data        alloy.lmp

#mass 1  47.867
#mass 2  26.9815

# ------------------------ FORCE FIELDS ------------------------------

pair_style   meam
pair_coeff	 * * library.meam Ni Cr NiCr.meam Ni Cr

#velocity       all      create 300 4928459 mom yes rot yes dist gaussian units box

# ------------------------- SETTINGS ---------------------------------
compute    1 all stress/atom NULL
compute    2 all reduce sum c_1[1] c_1[2] c_1[3]
compute csym all centro/atom fcc
compute peratom all pe/atom
######################################


# Store final cell length for strain calculations
#change_box all boundary p p s

variable tmp equal 32.45221635174232562 #The length for z axis (z2-z1) for relaxed file
variable L0 equal ${tmp}
print "Initial Length, L0: ${L0}"

######################################
# DEFORMATION in X-direction

reset_timestep	0
timestep 0.001
#fix     1  all nvt  temp  300 300 1

fix		1 all npt temp 300 300 1 x 0 0 1 y 0 0 1 drag 1
variable srate equal 1.0e10
variable srate1 equal "v_srate / 1.0e12"   #tension
fix		2 all deform 1 z erate ${srate1} units box remap x

# Output strain and stress info to file
# For units metal, pressure is in [bars] = 100 [kPa] = 1/10000 [GPa]
# p2, p3, p4 are in GPa
variable strain equal "(lz - v_L0)/v_L0"
variable p1 equal "v_strain"
variable p2 equal "-pxx/10000"
variable p3 equal "-pyy/10000"
variable p4 equal "-pzz/10000"
fix def1 all print 100 "${p1} ${p2} ${p3} ${p4}" file alloy.def1.txt screen no

# For atomic structure inspection
dump       1 all atom 250 dump.final

# Use cfg for AtomEye
# For atomic structure inspection
#dump       2 all atom 250 dump.final
#dump 		2 all cfg 500 dump.tensile_*.cfg mass type xs ys zs c_csym c_peratom fx fy fz
#dump_modify 2 element Hf Nb Ta Ti Zr

# Display thermo
thermo 	100
thermo_style	custom step v_strain v_p2 v_p3 v_p4 etotal press

run	   500000

# SIMULATION DONE
print "All done"
